## Лабораторна робота №1
# Тема:  Безперервно-детерміновані моделі
# Мета:  ознайомитися з прикладами безперервно-детермінованих
# моделей і методами їх побудови та дослідження.
5
# Моделювання процесу взаємодії двох популяцій - хижаків та їх жертв
# коефіцієнт народжуваноті жертв
a := 0.29
# коефіцієнт природної смертності жертв
b := 0.000006
# коефіцієнт смертності в результаті зустрічі з хижаком
c := 0.0003
# коефіцієнт народжуваності хижаків
d := 1*10^-5
# коефіцієнт природної смертності хижаків
e := 0.015
# коефіцієнт поповнення популяції хижаків внаслідок поїдання жертв
f := 1*10^-4
# Позначимо компоненти вектору працюючих змінних:
# - жертви, початкова чисельність
# - хижаки, початкова чисельність
y0 := [1200; 3200]
D(t, y) := [a*y[0] - b*y[0] - c*y[0]*y[1]; d*y[1] - e*y[1] + f*y[0]*y[1]]
# Формуємо векторну функцію двох аргументів -
# скалярного аргумента t (час) та векторного аргументу y
# Викликаємо процедури вирішення ДУ методом Рунге-Кута фіксованим кроком разрахунку:
# y - ім'я вектору працюючих змінних,
# t1 - початкове значення на шкалі часу,
# t2 - закінчене значення на шкалі часу,
# M - кількість точок розрахунку,
# D - ім'я векторної функції правих частин ДУ
t1 := 0
t2 := 1200
M := 1200
Z := rkfixed(y0, t1, t2, M, D)
i := 0 .. 1200
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Z =  # no stored result
# Висновок: У першій моделі було відтворено графік із методичних вказівок, який демонструє класичні коливання чисельності популяцій хижаків та жертв. Спостерігається, що кількість жертв спочатку зростає до максимальних значень, а потім різко зменшується через активність хижаків. При цьому динаміка популяції хижаків повторює тенденцію чисельності жертв, але із деяким часовим лагом.
# 2 єксперемент
# коефіцієнт народжуваноті жертв
a1 := 0.44
# коефіцієнт природної смертності жертв
b1 := 5*10^-6
# коефіцієнт смертності в результаті зустрічі з хижаком
c1 := 0.0005
# коефіцієнт народжуваності хижаків
d1 := 1*10^-5
# коефіцієнт природної смертності хижаків
e1 := 0.020
# коефіцієнт поповнення популяції хижаків внаслідок поїдання жертв
f1 := 1*10^-4
y[0] := 1200  # - хижаки, початкова чисельність
y[1] := 3200  # - жертви, початкова чисельність
y := [y[0]; y[1]]  # Задамо початкові умови у виді вектору
D(t, y) := [a1*y[0] - b1*y[0] - c1*y[0]*y[1]; d1*y[1] - e1*y[1] + f1*y[0]*y[1]]
t1 := 0
t2 := 1200
M := 1200
Z := rkfixed(y, t1, t2, M, D)
i := 0 .. 1200
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Z =  # no stored result
# Висновок: У другій моделі було змінено параметри хижаків, щоб збільшити популяцію хижаків. В результаті чисельність хижаків досягає значно вищих пікових значень, проте їхня динаміка, як і раніше, залежить від коливань популяції жертв.
# 3 єксперемент
# коефіцієнт народжуваноті жертв
a2 := 0.28
# коефіцієнт природної смертності жертв
b2 := 0.000006
# коефіцієнт смертності в результаті зустрічі з хижаком
c2 := 0.0002
# коефіцієнт народжуваності хижаків
d2 := 1*10^-2
# коефіцієнт природної смертності хижаків
e2 := 0.019
# коефіцієнт поповнення популяції хижаків внаслідок поїдання жертв
f2 := 1*10^-4
y0 := 1200  # - хижаки, початкова чисельність
y1 := 3200  # - жертви, початкова чисельність
y := [1200; 3200]  # Задамо початкові умови у виді вектору
D(t, y) := [a2*y[0] - b2*y[0] - c2*y[0]*y[1]; d2*y[1] - e2*y[1] + f2*y[0]*y[1]]
t1 := 0
t2 := 1200
M := 1200
Z := rkfixed(y, t1, t2, M, D)
i := 0 .. 1200
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Z =  # no stored result
# Висновок: У третій моделі були змінені параметри (збільшена народжуваність жертв, знижена природна смертність хижаків, зменшений вплив хижаків на жертв та знижена народжуваність хижаків), що призвело до суттєвого зростання популяції жертв. В результаті чисельність хижаків значно зменшилася, перебуваючи переважно на мінімальних значеннях, тоді як популяція жертв демонструє менш різкі спади та стабілізується на вищих рівнях.
# 4 єксперемент
# коефіцієнт народжуваноті жертв
a3 := 0.095
# коефіцієнт природної смертності жертв
b3 := 0.00006
# коефіцієнт смертності в результаті зустрічі з хижаком
c3 := 0.0002
# коефіцієнт народжуваності хижаків
d3 := 1*10^-2
# коефіцієнт природної смертності хижаків
e3 := 0.020
# коефіцієнт поповнення популяції хижаків внаслідок поїдання жертв
f3 := 1*10^-4
y0 := 1200  # - хижаки, початкова чисельність
y1 := 1200  # - жертви, початкова чисельність
y := [1200; 1200]  # Задамо початкові умови у виді вектору
D(t, y) := [a3*y[0] - b3*y[0] - c3*y[0]*y[1]; d3*y[1] - e3*y[1] + f3*y[0]*y[1]]
t1 := 0
t2 := 1200
M := 1200
Z := rkfixed(y, t1, t2, M, D)
i := 0 .. 1200
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Z =  # no stored result
# Висновок: У четвертій моделі було скориговано всі ключові параметри, щоб максимально збалансувати динаміку популяцій хижаків і жертв. Хоча чисельність обох видів стала більш узгодженою, графік демонструє, що популяція хижаків, як і раніше, коливається з більшою амплітудою та досягає пікових значень раніше, ніж популяція жертв. Це підтверджує, що навіть при збалансованих параметрах хижаки залишаються більш чутливими до змін у системі.
