# Варіант: 8
# 1. Задання вихідних даних
n := 1
ga := 50  # Ємність автосамоскида
ge := 25  # Ємність ковша екскаватора
m := 5  # Кількість автосамоскидів у системі
tob := 25  # Час обертання автосамоскида
tpцl := 20  # Час циклу навантаження екскаватора
# Інтенсивність надходження заявок (величина, зворотня середньому інтвервалу часу надхоження заявок):
λ := 60/tob
λ = 2.4
tзавант := (ga/ge)*tpцl/60
tзавант = 0.666667  # хв
# Інтенсивність обслуговування заявок
μ := 60/tзавант
μ = 90  # завант на год
# Приведена інтенсивність потоку заявок або коефіцієнт загрузки
p := λ/μ
p = 0.0266667
# Ймовірність простою екскаватора за формулою Ерланга
P[0] := 1/(1 + sum(m!/(m - n)!*p^n, n = 1 .. m))
P[0] = 0.870507
# 2. Початкові наближення:
P0 := 0.15
P1 := 0.15
P2 := 0.15
P3 := 0.15
P4 := 0.15
P5 := 0.25
# 3. Запис системи рівнянь, що описують функціонування одноканальної СМО
Given
P0*m*λ == P1*μ
P1*(μ + (m - 1)*λ) == P0*m*λ + P2*μ
P2*(2*μ + (m - 2)*λ) == P1*(m - 1)*λ + P3*μ
P3*(2*μ + (m - 3)*λ) == P2*(m - 2)*λ + P4*μ
P4*(2*μ + (m - 4)*λ) == P3*(m - 3)*λ + P5*μ
P0 + P1 + P2 + P3 + P4 + P5 == 1.0
[P0; P1; P2; P3; P4; P5] := Find(P0, P1, P2, P3, P4, P5)
# 4. Результати розв'яння рівнянь:
P0 = 0.797377
P1 = 0.106317
P2 = 0.0113405
P3 = 0.0122477
P4 = 0.0242414
P5 = 0.048476
# 5. Фактична продуктивність комплекту машин:
Pf := (1 - P0)*μ*ga
Pf = 911.802
# 6. Середнє число машин, що знаходяться в системі (у черзі або на завантаженні):
Nsyst := m - (1 - P0)/p
Nsyst = -2.59835
# 7. Середнє число машин, що знаходяться в черзі:
Nch := Nsyst - (1 - P0)
Nch = -2.80097
